# OpenSim document version 40000
CMCTool Results:
  model_file: /content/opensim-models/Pipelines/Gait2354_Simbody/subject01_2354_spring_1.osim
  replace_force_set: false
  force_set_files: gait2354_CMC_Actuators.xml
  results_directory: /content/opensim-models/Pipelines/Gait2354_Simbody/OutputReference/ResultsCMC_1
  output_precision: 20
  initial_time: 0.38
  final_time: 1.62
  solve_for_equilibrium_for_auxiliary_states: true
  maximum_number_of_integrator_steps: 30000
  maximum_integrator_step_size: 1
  minimum_integrator_step_size: 1e-10
  integrator_error_tolerance: 1e-5
  external_loads_file: /Users/jiangfangwei/Documents/OpenSim/4.1/Models/Gait2354_Simbody/subject01_walk1_grf.xml
  desired_kinematics_file: /Users/jiangfangwei/Documents/OpenSim/4.1/Models/Gait2354_Simbody/ResultsRRA/subject01_walk1_RRA_Kinematics_q.sto
  task_set_file: gait2354_CMC_Tasks.xml
  constraints_file: gait2354_CMC_ControlConstraints.xml
  lowpass_cutoff_frequency: -10
  cmc_time_window: 0.01
  use_fast_optimization_target: true
  optimizer_algorithm: ipopt
  optimizer_max_iterations: 2000
  optimizer_print_level: 0
  use_verbose_printing: false
  AnalysisSet Analyses:
    Kinematics: coordinates=all start_time=-Inf end_time=Inf step_interval=10 in_degrees=true
    Actuation: start_time=-Inf end_time=Inf step_interval=10 in_degrees=true
    ProbeReporter: start_time=-Inf end_time=Inf step_interval=10 in_degrees=true
    ForceReporter: start_time=-Inf end_time=Inf step_interval=10 in_degrees=true include_constraint_forces=false
